// COMSOL Multiphysics 6.0.0.405 model "CSMA_ALE0.mph"
// Outline of the model tree

Parameters
  vit0 = 1400 [mm/min]
  x0 = 0 [m]
  y0 = 0e-3[m]
  Rlaser = 1e-3 [m]
  alpha = 0.4
  Plaser = 1500 [W]
  tp = L/vit0
  L = 0.04
  f = 1/tp
  Rp = 0.25 [mm]
  N = 1
  longueur = 0.045
  largeur = 0.005
  hauteur = 0.00175
  hauteur_couche = 3.5E-4
  qm_poudre = 8 [g/min]
  Rpoudre = 0.001 [m]

Variables
  var1 "Variables 1"
    x0 = -0.02+vit0*t
    y0 = 0
    R = (1-((x-x0)^2+(y-y0)^2)/Rpoudre^2)*(1-((x-x0)^2+(y-y0)^2)/Rpoudre^2>0)
    source = alpha*Plaser/(pi*Rlaser^2)*((x-x0)^2+(y-y0)^2<=Rlaser^2)
    Vfront = 0.8*nz*5*qm_poudre/(pi*Rpoudre^2)/7400*exp(-5*((x-x0)^2+(y-y0)^2)/Rpoudre^2)

Geometry
  geom1 "Géométrie 1" (3D, length unit m)
    blk1: Block "Bloc 1" | pos = {0, 0, -hauteur/2}; base = center; size = {longueur, largeur, hauteur}
    fin: Finalize "Constituer une union"

Materials
  mat1: Common "Matériau 1" on all domains
    def "Basique"
      thermalconductivity = 29.6
      density = 7400
      heatcapacity = 720

Physics
  ht: HeatTransfer "Transfert de chaleur dans des solides" on all domains
    dependent variable T
    ShapeProperty.order_temperature = 1
    solid1: SolidHeatTransferModel "Solide 1" (default)
    init1: init "Valeurs initiales 1" (default)
    ins1: ThermalInsulation "Isolation thermique 1" (default)
    hf1: HeatFluxBoundary "Flux de chaleur 1" on boundaries 4 | q0 = source
  dg: DeformedGeometry "Géométrie déformée" on all domains
    FrameSettings.geometryShapeOrder = 1
    FreeDeformationSettings.smoothingType = laplace
    fix1: FixedMesh "Maillage fixe 1" (default)
    disp1: PrescribedMeshDisplacement "Déplacement imposé du maillage 1" (default)
    free1: FreeDeformation "Déformation libre 1" on domains 1
    vel1: PrescribedMeshVelocity "Vitesse imposée du maillage 1" on boundaries 4
      useVx = {0, 0, 1}
      vx = {0, 0, Vfront}
      weakConstraints = 0
      coordinateSystem = sys1
    disp2: PrescribedMeshDisplacement "Déplacement imposé du maillage 2" on boundaries 1, 6
      useDx = {1, 0, 0}
      dx = {0, 0, 0}
    disp3: PrescribedMeshDisplacement "Déplacement imposé du maillage 3" on boundaries 2, 5 | useDx = {0, 1, 0}
    disp4: PrescribedMeshDisplacement "Déplacement imposé du maillage 4" on boundaries 3 | useDx = {0, 0, 1}
    disp5: PrescribedMeshDisplacement "Déplacement imposé du maillage 5" (disabled) on boundaries 4
      useDx = {0, 0, 0}
      dx = {0, 0, Vint}

Mesh
  mesh1 "Maillage 1"
    size: MeshSizeDefault "Taille" | hmax = 0.0045; hmin = 8.1E-4; hcurve = 0.6; hnarrow = 0.5; hgrad = 1.5
    map1: Map "Quadrangle structuré 1" on boundaries 4
      size1: Size "Taille 1" on boundaries 4 | hmax = hauteur_couche/1; custom = on
    swe1: Sweep "Extrusion 1" on remaining entities
      size1: Size "Taille 1" on entire geometry | hmax = hauteur_couche/1; custom = on

Studies
  std1 "Etude 1"
    time: Transient "Temporel" | tlist = range(0,Rlaser/vit0/2,N*tp)

Solver configurations
  sol1 "Solution 1" (study std1)
    v1: Variables "Variables dépendantes 1"
      comp1_material_disp: Field "Déplacement du maillage matériau (comp1.material.disp)"
        scalemethod = manual
        scaleval = 0.00070171641698
    t1: Time "Solveur temporel 1"
      tlist = range(0,Rlaser/vit0/2,N*tp)
      atolmethod = {comp1_material_disp, global, comp1_T, global}
      atolvaluemethod = {comp1_material_disp, factor, comp1_T, factor}
      atol = {comp1_material_disp, 1e-3, comp1_T, 1e-3}
      timemethod = genalpha
      maxorder = 2
      estrat = exclude
      tstepsgenalpha = manual
      timestepgenalpha = Rlaser/vit0/2
      dDef: Direct
      se1: Segregated "Ségrégé 1" | segstabacc = segaacc; segaaccdim = 5; segaaccmix = 0.9; segaaccdelay = 1
        ss1: SegregatedStep "Température" | segvar = {comp1_T}; linsolver = d1; subdamp = 0.7; subjtech = onevery
        ss2: SegregatedStep "Coordonnées du référentiel matériau"
          segvar = {comp1_material_disp}
          linsolver = dDef
          subjtech = onevery
      d1: Direct "Direct, température (ht)" | linsolver = pardiso; pivotperturb = 1.0E-13

Datasets
  dset1: Solution | solution = sol1

Plots
  pg1: PlotGroup3D "Température (ht)" | data = dset1
    surf1: Surface | expr = T; unit = K
    con1: Contour "Isovaleurs 1" | expr = T; levelmethod = levels; levels = 1720