// COMSOL Multiphysics 6.0.0.405 model "CSMA_activEl0.mph"
// Outline of the model tree

Parameters
  vit0 = 1400 [mm/min]
  x0 = 0 [m]
  y0 = 0e-3[m]
  Rlaser = 1e-3 [m]
  alpha = 0.4
  Plaser = 1500 [W]
  tp = L/vit0
  L = 0.04
  f = 1/tp
  Rp = 0.25 [mm]
  N = 1
  longueur = 0.045
  largeur = 0.005
  hauteur = 0.00175
  hauteur_couche = 3.5E-4

Variables
  var1 "Variables 1"
    x0 = -0.02+vit0*t
    y0 = 0
    R = sqrt((x-x0)^2+(y-y0)^2)
    source = alpha*Plaser/(pi*Rlaser^2)*((x-x0)^2+(y-y0)^2<=Rlaser^2)

Geometry
  geom1 "Géométrie 1" (3D, length unit m)
    blk1: Block "Bloc 1" | pos = {0, 0, -hauteur/2}; base = center; size = {longueur, largeur, hauteur}
    blk2: Block "Bloc 2"
      pos = {0, 0, hauteur_couche/2+0*hauteur_couche}
      base = center
      size = {longueur, largeur, hauteur_couche}
    fin: Finalize "Constituer une union"

Materials
  mat1: Common "Matériau 1" on all domains
    def "Basique"
      youngsmodulus = 210e9
      poissonsratio = 0.3
      density = 7400
      thermalconductivity = 29.6
      heatcapacity = 720

Physics
  solid: SolidMechanics "Mécanique du solide" on all domains
    dependent variable u = {u, v, w}
    ShapeProperty.order_displacement = 1
    lemm1: LinearElasticModel "Matériau élastique linéaire 1" (default)
    free1: Free "Libre 1" (default)
    init1: init "Valeurs initiales 1" (default)
    lemm2: LinearElasticModel "Couche1" on domains 2
      act1: Activation on all domains | activation_expression = ((R<=Rlaser)*(t>0*tp)*(t<1*tp) || solid.wasactive)
  ht: HeatTransfer "Transfert de chaleur dans des solides" on all domains
    dependent variable T
    ShapeProperty.order_temperature = 1
    ConsistentStabilization.heatStreamlineDiffusion = 0
    ConsistentStabilization.heatCrosswindDiffusion = 0
    solid1: SolidHeatTransferModel "Solide 1" (default)
    init1: init "Valeurs initiales 1" (default)
    ins1: ThermalInsulation "Isolation thermique 1" (default)
    solid2: SolidHeatTransferModel "Couche1" on domains 2
      k_mat = userdef
      k = 29.6*solid.isactive+0.3*(1-solid.isactive)
      rho_mat = userdef
      rho = 7400*solid.isactive+1.2*(1-solid.isactive)
      Cp_mat = userdef
      Cp = 720*solid.isactive+1000*(1-solid.isactive)
    hf1: HeatFluxBoundary "Flux de chaleur 1" on boundaries 7 | q0 = source*solid.isactive*(t>0*tp)*(t<1*tp)

Mesh
  mesh1 "Maillage 1"
    size: MeshSizeDefault "Taille" | hmax = 0.0045; hmin = 8.1E-4; hcurve = 0.6; hnarrow = 0.5; hgrad = 1.5
    map1: Map "Quadrangle structuré 1" on all boundaries
      size1: Size "Taille 1" on all boundaries | hmax = hauteur_couche/1; custom = on
    swe1: Sweep "Extrusion 1" on remaining entities | sourceface = boundaries 1
      size1: Size "Taille 1" on entire geometry | hmax = hauteur_couche/1; custom = on

Studies
  std1 "Etude 1"
    time: Transient "Temporel" | tlist = range(0,Rlaser/vit0/2,N*tp)

Solver configurations
  sol1 "Solution 1" (study std1)
    v1: Variables "Variables dépendantes 1.1"
      comp1_u: Field "Champ de déplacement (comp1.u)" | scalemethod = manual; scaleval = 1e-2*0.0541848687366
    t1: Time "Solveur temporel 1.1"
      tlist = range(0,Rlaser/vit0/2,N*tp)
      timemethod = genalpha
      tstepsgenalpha = manual
      timestepgenalpha = Rlaser/vit0/2
      d1: Direct
      se1: Segregated "Ségrégé 1"
        ssDef: SegregatedStep "Etape ségrégée"
        ss1: SegregatedStep "Etape ségrégée 1"

Datasets
  dset1: Solution | solution = sol1

Plots
  pg1: PlotGroup3D "Groupe de graphiques 3D 1" | data = dset1
    vol1: Volume | expr = T
      filt1: Filter "Filtre 1" | expr = solid.isactive
    con1: Contour "Isovaleurs 1" | expr = T; levelmethod = levels; levels = 1720